<neuroml xmlns="http://www.neuroml.org/schema/neuroml2"  xmlns:xs="http://www.w3.org/2001/XMLSchema" xmlns:xsi="http://www.w3.org/2001/XMLSchema-instance" xsi:schemaLocation="http://www.neuroml.org/schema/neuroml2 https://raw.github.com/NeuroML/NeuroML2/development/Schemas/NeuroML2/NeuroML_v2beta5.xsd" id="ISN_net">
    <notes>

This NeuroML 2 file was generated by OpenCortex v0.1.10 using:
    libNeuroML v0.2.40
    pyNeuroML v0.3.11

    </notes>
    <property tag="Network seed" value="123456"/>
    <include href="ISN_net/HH2_477127614.cell.nml"></include>
    <include href="ISN_net/IM.channel.nml"></include>
    <include href="ISN_net/Kd.channel.nml"></include>
    <include href="ISN_net/Leak.channel.nml"></include>
    <include href="ISN_net/Na.channel.nml"></include>
    <include href="ISN_net/IL.channel.nml"></include>
    <include href="ISN_net/HH2_476686112.cell.nml"></include>
    <include href="ISN_net/L23_NoHotSpot.cell.nml"></include>
    <include href="ISN_net/ca.channel.nml"></include>
    <include href="ISN_net/it.channel.nml"></include>
    <include href="ISN_net/kca.channel.nml"></include>
    <include href="ISN_net/km.channel.nml"></include>
    <include href="ISN_net/kv.channel.nml"></include>
    <include href="ISN_net/na.channel.nml"></include>
    <include href="ISN_net/pas.channel.nml"></include>
    <expOneSynapse id="synAmpaEE" gbase="5e-06nS" erev="0mV" tauDecay="1ms"/>
    <expOneSynapse id="synAmpaEI" gbase="5e-06nS" erev="0mV" tauDecay="1ms"/>
    <expOneSynapse id="synGabaIE" gbase="1e-05nS" erev="-80mV" tauDecay="1ms"/>
    <expOneSynapse id="synGabaII" gbase="1e-05nS" erev="-80mV" tauDecay="1ms"/>
    <expOneSynapse id="synAmpaBkg" gbase="0.5nS" erev="0mV" tauDecay="1ms"/>
    <expOneSynapse id="synAmpaStim" gbase="0.5nS" erev="0mV" tauDecay="1ms"/>
    <transientPoissonFiringSynapse id="tpsfA" averageRate="10000.0 Hz" delay="0ms" duration="200.0ms" synapse="synAmpaBkg" spikeTarget="./synAmpaBkg"/>
    <transientPoissonFiringSynapse id="tpsfB" averageRate="10000.0 Hz" delay="200.0ms" duration="100.0ms" synapse="synAmpaBkg" spikeTarget="./synAmpaBkg"/>
    <transientPoissonFiringSynapse id="tpsfC" averageRate="9800.0 Hz" delay="200.0ms" duration="100.0ms" synapse="synAmpaStim" spikeTarget="./synAmpaStim"/>
    <transientPoissonFiringSynapse id="tpfsExtExc" averageRate="1 Hz" delay="0ms" duration="300.0ms" synapse="synAmpaBkg" spikeTarget="./synAmpaBkg"/>
    <transientPoissonFiringSynapse id="tpfsExtInh" averageRate="1 Hz" delay="0ms" duration="300.0ms" synapse="synAmpaBkg" spikeTarget="./synAmpaBkg"/>
    <network id="ISN_net" type="networkWithTemperature" temperature="32degC">
        <population id="popExc" component="HH2_477127614" size="76" type="populationList">
            <instance id="0">
                <location x="213.938999999999993" y="58.811799999999998" z="-329.401970000000006"/>
            </instance>
            <instance id="1">
                <location x="-227.740530000000007" y="-99.554019999999994" z="114.718149999999994"/>
            </instance>
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        </population>
        <population id="popExc2" component="L23_NoHotSpot" size="4" type="populationList">
            <instance id="0">
                <location x="-329.958570000000009" y="-51.469110000000001" z="-101.501509999999996"/>
            </instance>
            <instance id="1">
                <location x="-129.016960000000012" y="-8.239839999999999" z="49.349290000000003"/>
            </instance>
            <instance id="2">
                <location x="-101.06071" y="-98.209329999999994" z="-145.785380000000004"/>
            </instance>
            <instance id="3">
                <location x="-157.910239999999988" y="84.289439999999999" z="-158.389819999999986"/>
            </instance>
        </population>
        <population id="popInh" component="HH2_476686112" size="20" type="populationList">
            <instance id="0">
                <location x="-79.420929999999998" y="-57.47784" z="-131.634160000000008"/>
            </instance>
            <instance id="1">
                <location x="-305.189489999999978" y="83.28013" z="-35.158099999999997"/>
            </instance>
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        </population>
        <projection id="projEE_popExc_popExc" presynapticPopulation="popExc" postsynapticPopulation="popExc" synapse="synAmpaEE">
            <connectionWD id="0" preCellId="../popExc/0/HH2_477127614" postCellId="../popExc/33/HH2_477127614" weight="1.473883636227842" delay="0.1 ms"/>
            <connectionWD id="1" preCellId="../popExc/0/HH2_477127614" postCellId="../popExc/59/HH2_477127614" weight="0.626393576431366" delay="0.1 ms"/>
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        </projection>
        <projection id="projEE_popExc_popExc2" presynapticPopulation="popExc" postsynapticPopulation="popExc2" synapse="synAmpaEE">
            <connectionWD id="0" preCellId="../popExc/0/HH2_477127614" postCellId="../popExc2/1/L23_NoHotSpot" postSegmentId="225" postFractionAlong="0.416062463877" weight="1.041820116107962" delay="0.1 ms"/>
            <connectionWD id="1" preCellId="../popExc/1/HH2_477127614" postCellId="../popExc2/0/L23_NoHotSpot" postSegmentId="961" postFractionAlong="0.219221445983" weight="1.269144622825331" delay="0.1 ms"/>
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        </projection>
        <projection id="projEI_popExc_popInh" presynapticPopulation="popExc" postsynapticPopulation="popInh" synapse="synAmpaEI">
            <connectionWD id="0" preCellId="../popExc/0/HH2_477127614" postCellId="../popInh/0/HH2_476686112" weight="1.738019576589738" delay="0.1 ms"/>
            <connectionWD id="1" preCellId="../popExc/0/HH2_477127614" postCellId="../popInh/9/HH2_476686112" weight="1.93530797005933" delay="0.1 ms"/>
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        </projection>
        <projection id="projEE_popExc2_popExc" presynapticPopulation="popExc2" postsynapticPopulation="popExc" synapse="synAmpaEE">
            <connectionWD id="0" preCellId="../popExc2/3/L23_NoHotSpot" preFractionAlong="0.89189208756" postCellId="../popExc/0/HH2_477127614" weight="1.835280429128349" delay="0.1 ms"/>
            <connectionWD id="1" preCellId="../popExc2/3/L23_NoHotSpot" preFractionAlong="0.17513387291" postCellId="../popExc/1/HH2_477127614" weight="1.294284788392717" delay="0.1 ms"/>
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        </projection>
        <projection id="projEE_popExc2_popExc2" presynapticPopulation="popExc2" postsynapticPopulation="popExc2" synapse="synAmpaEE">
            <connectionWD id="0" preCellId="../popExc2/0/L23_NoHotSpot" preFractionAlong="0.363531183877" postCellId="../popExc2/0/L23_NoHotSpot" postSegmentId="1609" postFractionAlong="0.805132237782" weight="1.66507170921378" delay="0.1 ms"/>
            <connectionWD id="1" preCellId="../popExc2/1/L23_NoHotSpot" preFractionAlong="0.440975173881" postCellId="../popExc2/3/L23_NoHotSpot" postSegmentId="823" postFractionAlong="0.749664337164" weight="0.944339439020306" delay="0.1 ms"/>
            <connectionWD id="2" preCellId="../popExc2/2/L23_NoHotSpot" preFractionAlong="0.655952942557" postCellId="../popExc2/3/L23_NoHotSpot" postSegmentId="1649" postFractionAlong="0.67274150471" weight="1.987278374000998" delay="0.1 ms"/>
            <connectionWD id="3" preCellId="../popExc2/3/L23_NoHotSpot" preFractionAlong="0.859646817429" postCellId="../popExc2/3/L23_NoHotSpot" postSegmentId="1440" postFractionAlong="0.516464542896" weight="0.71225361159672" delay="0.1 ms"/>
        </projection>
        <projection id="projEI_popExc2_popInh" presynapticPopulation="popExc2" postsynapticPopulation="popInh" synapse="synAmpaEI">
            <connectionWD id="0" preCellId="../popExc2/3/L23_NoHotSpot" preFractionAlong="0.589676989553" postCellId="../popInh/0/HH2_476686112" weight="0.701430557272993" delay="0.1 ms"/>
            <connectionWD id="1" preCellId="../popExc2/3/L23_NoHotSpot" preFractionAlong="0.848595727779" postCellId="../popInh/1/HH2_476686112" weight="0.977959779041872" delay="0.1 ms"/>
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        </projection>
        <projection id="projIE_popInh_popExc" presynapticPopulation="popInh" postsynapticPopulation="popExc" synapse="synGabaIE">
            <connectionWD id="0" preCellId="../popInh/7/HH2_476686112" postCellId="../popExc/0/HH2_477127614" weight="0.47196476016682" delay="0.1 ms"/>
            <connectionWD id="1" preCellId="../popInh/16/HH2_476686112" postCellId="../popExc/0/HH2_477127614" weight="0.633525179270718" delay="0.1 ms"/>
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        </projection>
        <projection id="projIE_popInh_popExc2" presynapticPopulation="popInh" postsynapticPopulation="popExc2" synapse="synGabaIE">
            <connectionWD id="0" preCellId="../popInh/0/HH2_476686112" postCellId="../popExc2/3/L23_NoHotSpot" postFractionAlong="0.0418964602034" weight="0.872088254438017" delay="0.1 ms"/>
            <connectionWD id="1" preCellId="../popInh/0/HH2_476686112" postCellId="../popExc2/2/L23_NoHotSpot" postFractionAlong="0.642350657519" weight="1.208678452293777" delay="0.1 ms"/>
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        </projection>
        <projection id="projII_popInh_popInh" presynapticPopulation="popInh" postsynapticPopulation="popInh" synapse="synGabaII">
            <connectionWD id="0" preCellId="../popInh/0/HH2_476686112" postCellId="../popInh/9/HH2_476686112" weight="1.090038232001182" delay="0.1 ms"/>
            <connectionWD id="1" preCellId="../popInh/0/HH2_476686112" postCellId="../popInh/18/HH2_476686112" weight="0.861372600950376" delay="0.1 ms"/>
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        </projection>
        <inputList id="Stim_pre_ExtExc_popExc" population="popExc" component="tpfsExtExc">
            <input id="0" target="../popExc/0/HH2_477127614" destination="synapses" segmentId="0" fractionAlong="0.5"/>
            <input id="1" target="../popExc/1/HH2_477127614" destination="synapses" segmentId="0" fractionAlong="0.5"/>
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        </inputList>
        <inputList id="Stim_pre_popExc" population="popExc" component="tpsfA">
            <input id="0" target="../popExc/0/HH2_477127614" destination="synapses" segmentId="0" fractionAlong="0.5"/>
            <input id="1" target="../popExc/1/HH2_477127614" destination="synapses" segmentId="0" fractionAlong="0.5"/>
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        </inputList>
        <inputList id="Stim_E_popExc" population="popExc" component="tpsfB">
            <input id="0" target="../popExc/0/HH2_477127614" destination="synapses" segmentId="0" fractionAlong="0.5"/>
            <input id="1" target="../popExc/1/HH2_477127614" destination="synapses" segmentId="0" fractionAlong="0.5"/>
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        </inputList>
        <inputList id="Stim_pre_ExtExc_popExc2" population="popExc2" component="tpfsExtExc">
            <input id="0" target="../popExc2/0/L23_NoHotSpot" destination="synapses" segmentId="0" fractionAlong="0.5"/>
            <input id="1" target="../popExc2/1/L23_NoHotSpot" destination="synapses" segmentId="0" fractionAlong="0.5"/>
            <input id="2" target="../popExc2/2/L23_NoHotSpot" destination="synapses" segmentId="0" fractionAlong="0.5"/>
            <input id="3" target="../popExc2/3/L23_NoHotSpot" destination="synapses" segmentId="0" fractionAlong="0.5"/>
        </inputList>
        <inputList id="Stim_pre_popExc2" population="popExc2" component="tpsfA">
            <input id="0" target="../popExc2/0/L23_NoHotSpot" destination="synapses" segmentId="0" fractionAlong="0.5"/>
            <input id="1" target="../popExc2/1/L23_NoHotSpot" destination="synapses" segmentId="0" fractionAlong="0.5"/>
            <input id="2" target="../popExc2/2/L23_NoHotSpot" destination="synapses" segmentId="0" fractionAlong="0.5"/>
            <input id="3" target="../popExc2/3/L23_NoHotSpot" destination="synapses" segmentId="0" fractionAlong="0.5"/>
        </inputList>
        <inputList id="Stim_E_popExc2" population="popExc2" component="tpsfB">
            <input id="0" target="../popExc2/0/L23_NoHotSpot" destination="synapses" segmentId="0" fractionAlong="0.5"/>
            <input id="1" target="../popExc2/1/L23_NoHotSpot" destination="synapses" segmentId="0" fractionAlong="0.5"/>
            <input id="2" target="../popExc2/2/L23_NoHotSpot" destination="synapses" segmentId="0" fractionAlong="0.5"/>
            <input id="3" target="../popExc2/3/L23_NoHotSpot" destination="synapses" segmentId="0" fractionAlong="0.5"/>
        </inputList>
        <inputList id="Stim_pre_ExtInh_popInh" population="popInh" component="tpfsExtInh">
            <input id="0" target="../popInh/0/HH2_476686112" destination="synapses" segmentId="0" fractionAlong="0.5"/>
            <input id="1" target="../popInh/1/HH2_476686112" destination="synapses" segmentId="0" fractionAlong="0.5"/>
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        </inputList>
        <inputList id="Stim_pre_popInh" population="popInh" component="tpsfA">
            <input id="0" target="../popInh/0/HH2_476686112" destination="synapses" segmentId="0" fractionAlong="0.5"/>
            <input id="1" target="../popInh/1/HH2_476686112" destination="synapses" segmentId="0" fractionAlong="0.5"/>
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        </inputList>
        <inputList id="Stim_I_pert_popInh" population="popInh" component="tpsfC">
            <input id="0" target="../popInh/0/HH2_476686112" destination="synapses" segmentId="0" fractionAlong="0.5"/>
            <input id="1" target="../popInh/1/HH2_476686112" destination="synapses" segmentId="0" fractionAlong="0.5"/>
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        </inputList>
        <inputList id="Stim_I_nonpert_popInh" population="popInh" component="tpsfB">
            <input id="0" target="../popInh/10/HH2_476686112" destination="synapses" segmentId="0" fractionAlong="0.5"/>
            <input id="1" target="../popInh/11/HH2_476686112" destination="synapses" segmentId="0" fractionAlong="0.5"/>
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        </inputList>
    </network>
</neuroml>
