<neuroml xmlns="http://www.neuroml.org/schema/neuroml2"  xmlns:xs="http://www.w3.org/2001/XMLSchema" xmlns:xsi="http://www.w3.org/2001/XMLSchema-instance" xsi:schemaLocation="http://www.neuroml.org/schema/neuroml2 https://raw.github.com/NeuroML/NeuroML2/development/Schemas/NeuroML2/NeuroML_v2beta5.xsd" id="Multiscale__g1_5__i250A">
    <notes>

This NeuroML 2 file was generated by OpenCortex v0.1.5 using:
    libNeuroML v0.2.34
    pyNeuroML v0.3.1

    </notes>
    <property tag="Network seed" value="1234"/>
    <include href="Multiscale__g1_5__i250A/AllenHH_477127614.cell.nml"></include>
    <include href="Multiscale__g1_5__i250A/NaTs.channel.nml"></include>
    <include href="Multiscale__g1_5__i250A/K_P.channel.nml"></include>
    <include href="Multiscale__g1_5__i250A/Nap.channel.nml"></include>
    <include href="Multiscale__g1_5__i250A/Kv3_1.channel.nml"></include>
    <include href="Multiscale__g1_5__i250A/K_T.channel.nml"></include>
    <include href="Multiscale__g1_5__i250A/SK.channel.nml"></include>
    <include href="Multiscale__g1_5__i250A/Im.channel.nml"></include>
    <include href="Multiscale__g1_5__i250A/Ih.channel.nml"></include>
    <include href="Multiscale__g1_5__i250A/Ca_LVA.channel.nml"></include>
    <include href="Multiscale__g1_5__i250A/Ca_HVA.channel.nml"></include>
    <include href="Multiscale__g1_5__i250A/pas.channel.nml"></include>
    <include href="Multiscale__g1_5__i250A/CaDynamics.nml"></include>
    <include href="Multiscale__g1_5__i250A/AllenHH_476686112.cell.nml"></include>
    <expTwoSynapse id="synAmpa1" gbase="1.0nS" erev="0mV" tauDecay="5ms" tauRise="0.5ms"/>
    <expTwoSynapse id="synGaba1" gbase="1.5nS" erev="-80mV" tauDecay="20ms" tauRise="1ms"/>
    <poissonFiringSynapse id="psf1" averageRate="250 Hz" synapse="synAmpa1" spikeTarget="./synAmpa1"/>
    <network id="Multiscale__g1_5__i250A" type="networkWithTemperature" temperature="32degC">
        <population id="popExc" component="AllenHH_477127614" size="80" type="populationList">
            <instance id="0">
                <location x="326.517474983999989" y="-11.853480164900001" z="-344.755970959000024"/>
            </instance>
            <instance id="1">
                <location x="287.68317371400002" y="87.853799472800006" z="57.559301141299997"/>
            </instance>
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        </population>
        <population id="popInh" component="AllenHH_476686112" size="40" type="populationList">
            <instance id="0">
                <location x="-236.225995164000011" y="-0.116794280789" z="308.033651657999997"/>
            </instance>
            <instance id="1">
                <location x="315.127889024000012" y="-72.012263718499995" z="22.6196485448"/>
            </instance>
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        </population>
        <projection id="projEE_popExc_popExc" presynapticPopulation="popExc" postsynapticPopulation="popExc" synapse="synAmpa1">
            <connectionWD id="0" preCellId="../popExc/0/AllenHH_477127614" postCellId="../popExc/37/AllenHH_477127614" weight="1." delay="2 ms"/>
            <connectionWD id="1" preCellId="../popExc/0/AllenHH_477127614" postCellId="../popExc/73/AllenHH_477127614" weight="1." delay="2 ms"/>
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        </projection>
        <projection id="projEI_popExc_popInh" presynapticPopulation="popExc" postsynapticPopulation="popInh" synapse="synAmpa1">
            <connectionWD id="0" preCellId="../popExc/0/AllenHH_477127614" postCellId="../popInh/10/AllenHH_476686112" weight="1." delay="2 ms"/>
            <connectionWD id="1" preCellId="../popExc/0/AllenHH_477127614" postCellId="../popInh/0/AllenHH_476686112" weight="1." delay="2 ms"/>
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        </projection>
        <projection id="projIE_popInh_popExc" presynapticPopulation="popInh" postsynapticPopulation="popExc" synapse="synGaba1">
            <connectionWD id="0" preCellId="../popInh/33/AllenHH_476686112" postCellId="../popExc/0/AllenHH_477127614" weight="1." delay="2 ms"/>
            <connectionWD id="1" preCellId="../popInh/21/AllenHH_476686112" postCellId="../popExc/0/AllenHH_477127614" weight="1." delay="2 ms"/>
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        </projection>
        <projection id="projII_popInh_popInh" presynapticPopulation="popInh" postsynapticPopulation="popInh" synapse="synGaba1">
            <connectionWD id="0" preCellId="../popInh/0/AllenHH_476686112" postCellId="../popInh/22/AllenHH_476686112" weight="1." delay="2 ms"/>
            <connectionWD id="1" preCellId="../popInh/0/AllenHH_476686112" postCellId="../popInh/19/AllenHH_476686112" weight="1." delay="2 ms"/>
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        </projection>
        <inputList id="Stim_popExc" population="popExc" component="psf1">
            <input id="0" target="../popExc/0/AllenHH_477127614" destination="synapses" segmentId="0" fractionAlong="0.5"/>
            <input id="1" target="../popExc/1/AllenHH_477127614" destination="synapses" segmentId="0" fractionAlong="0.5"/>
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        </inputList>
    </network>
</neuroml>
