<neuroml xmlns="http://www.neuroml.org/schema/neuroml2"  xmlns:xs="http://www.w3.org/2001/XMLSchema" xmlns:xsi="http://www.w3.org/2001/XMLSchema-instance" xsi:schemaLocation="http://www.neuroml.org/schema/neuroml2 https://raw.github.com/NeuroML/NeuroML2/development/Schemas/NeuroML2/NeuroML_v2beta5.xsd" id="Multiscale__g1_5__i250B">
    <notes>

This NeuroML 2 file was generated by OpenCortex v0.1.6 using:
    libNeuroML v0.2.34
    pyNeuroML v0.3.2

    </notes>
    <property tag="Network seed" value="1234"/>
    <include href="Multiscale__g1_5__i250B/AllenHH_477127614.cell.nml"></include>
    <include href="Multiscale__g1_5__i250B/NaTs.channel.nml"></include>
    <include href="Multiscale__g1_5__i250B/K_P.channel.nml"></include>
    <include href="Multiscale__g1_5__i250B/Nap.channel.nml"></include>
    <include href="Multiscale__g1_5__i250B/Kv3_1.channel.nml"></include>
    <include href="Multiscale__g1_5__i250B/K_T.channel.nml"></include>
    <include href="Multiscale__g1_5__i250B/SK.channel.nml"></include>
    <include href="Multiscale__g1_5__i250B/Im.channel.nml"></include>
    <include href="Multiscale__g1_5__i250B/Ih.channel.nml"></include>
    <include href="Multiscale__g1_5__i250B/Ca_LVA.channel.nml"></include>
    <include href="Multiscale__g1_5__i250B/Ca_HVA.channel.nml"></include>
    <include href="Multiscale__g1_5__i250B/pas.channel.nml"></include>
    <include href="Multiscale__g1_5__i250B/CaDynamics.nml"></include>
    <include href="Multiscale__g1_5__i250B/AllenHH_476686112.cell.nml"></include>
    <include href="Multiscale__g1_5__i250B/L23PyrRS.cell.nml"></include>
    <include href="Multiscale__g1_5__i250B/ar__m00_25.channel.nml"></include>
    <include href="Multiscale__g1_5__i250B/cad__beta0_01__phi26000.nml"></include>
    <include href="Multiscale__g1_5__i250B/cad__beta0_05__phi52000.nml"></include>
    <include href="Multiscale__g1_5__i250B/cal.channel.nml"></include>
    <include href="Multiscale__g1_5__i250B/cat.channel.nml"></include>
    <include href="Multiscale__g1_5__i250B/k2.channel.nml"></include>
    <include href="Multiscale__g1_5__i250B/ka.channel.nml"></include>
    <include href="Multiscale__g1_5__i250B/kahp.channel.nml"></include>
    <include href="Multiscale__g1_5__i250B/kc.channel.nml"></include>
    <include href="Multiscale__g1_5__i250B/kdr.channel.nml"></include>
    <include href="Multiscale__g1_5__i250B/km.channel.nml"></include>
    <include href="Multiscale__g1_5__i250B/naf__a0__b0__c0__d0__fastNa_shiftmin3_5.channel.nml"></include>
    <include href="Multiscale__g1_5__i250B/nap.channel.nml"></include>
    <expTwoSynapse id="synAmpa1" gbase="1.0nS" erev="0mV" tauDecay="5ms" tauRise="0.5ms"/>
    <expTwoSynapse id="synGaba1" gbase="1.5nS" erev="-80mV" tauDecay="20ms" tauRise="1ms"/>
    <poissonFiringSynapse id="psf1" averageRate="250 Hz" synapse="synAmpa1" spikeTarget="./synAmpa1"/>
    <network id="Multiscale__g1_5__i250B" type="networkWithTemperature" temperature="32degC">
        <population id="popExc" component="AllenHH_477127614" size="79" type="populationList">
            <instance id="0">
                <location x="326.517470000000003" y="-11.853479999999999" z="-344.755969999999991"/>
            </instance>
            <instance id="1">
                <location x="287.683170000000018" y="87.853800000000007" z="57.5593"/>
            </instance>
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        </population>
        <population id="popExc2" component="L23PyrRS" size="1" type="populationList">
            <instance id="0">
                <location x="127.926000000000002" y="-33.781730000000003" z="44.925879999999999"/>
            </instance>
        </population>
        <population id="popInh" component="AllenHH_476686112" size="40" type="populationList">
            <instance id="0">
                <location x="-236.225999999999999" y="-0.11679" z="308.033650000000023"/>
            </instance>
            <instance id="1">
                <location x="315.127889999999979" y="-72.012259999999998" z="22.61965"/>
            </instance>
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        </population>
        <projection id="projEE_popExc_popExc" presynapticPopulation="popExc" postsynapticPopulation="popExc" synapse="synAmpa1">
            <connectionWD id="0" preCellId="../popExc/0/AllenHH_477127614" postCellId="../popExc/73/AllenHH_477127614" weight="1." delay="2 ms"/>
            <connectionWD id="1" preCellId="../popExc/0/AllenHH_477127614" postCellId="../popExc/72/AllenHH_477127614" weight="1." delay="2 ms"/>
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        </projection>
        <projection id="projEE_popExc_popExc2" presynapticPopulation="popExc" postsynapticPopulation="popExc2" synapse="synAmpa1">
            <connectionWD id="0" preCellId="../popExc/0/AllenHH_477127614" postCellId="../popExc2/0/L23PyrRS" postSegmentId="37" postFractionAlong="0.466374431926" weight="1." delay="2 ms"/>
            <connectionWD id="1" preCellId="../popExc/5/AllenHH_477127614" postCellId="../popExc2/0/L23PyrRS" postSegmentId="58" postFractionAlong="0.155033035127" weight="1." delay="2 ms"/>
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        </projection>
        <projection id="projEI_popExc_popInh" presynapticPopulation="popExc" postsynapticPopulation="popInh" synapse="synAmpa1">
            <connectionWD id="0" preCellId="../popExc/0/AllenHH_477127614" postCellId="../popInh/6/AllenHH_476686112" weight="1." delay="2 ms"/>
            <connectionWD id="1" preCellId="../popExc/0/AllenHH_477127614" postCellId="../popInh/13/AllenHH_476686112" weight="1." delay="2 ms"/>
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        </projection>
        <projection id="projEE_popExc2_popExc" presynapticPopulation="popExc2" postsynapticPopulation="popExc" synapse="synAmpa1">
            <connectionWD id="0" preCellId="../popExc2/0/L23PyrRS" preFractionAlong="0.414222803415" postCellId="../popExc/2/AllenHH_477127614" weight="1." delay="2 ms"/>
            <connectionWD id="1" preCellId="../popExc2/0/L23PyrRS" preSegmentId="1" preFractionAlong="0.181496998932" postCellId="../popExc/6/AllenHH_477127614" weight="1." delay="2 ms"/>
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        </projection>
        <projection id="projEI_popExc2_popInh" presynapticPopulation="popExc2" postsynapticPopulation="popInh" synapse="synAmpa1">
            <connectionWD id="0" preCellId="../popExc2/0/L23PyrRS" preSegmentId="1" preFractionAlong="0.167340245017" postCellId="../popInh/0/AllenHH_476686112" weight="1." delay="2 ms"/>
            <connectionWD id="1" preCellId="../popExc2/0/L23PyrRS" preFractionAlong="0.117025318846" postCellId="../popInh/1/AllenHH_476686112" weight="1." delay="2 ms"/>
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        </projection>
        <projection id="projIE_popInh_popExc" presynapticPopulation="popInh" postsynapticPopulation="popExc" synapse="synGaba1">
            <connectionWD id="0" preCellId="../popInh/7/AllenHH_476686112" postCellId="../popExc/0/AllenHH_477127614" weight="1." delay="2 ms"/>
            <connectionWD id="1" preCellId="../popInh/39/AllenHH_476686112" postCellId="../popExc/0/AllenHH_477127614" weight="1." delay="2 ms"/>
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        </projection>
        <projection id="projIE_popInh_popExc2" presynapticPopulation="popInh" postsynapticPopulation="popExc2" synapse="synGaba1">
            <connectionWD id="0" preCellId="../popInh/0/AllenHH_476686112" postCellId="../popExc2/0/L23PyrRS" postFractionAlong="0.929612336466" weight="1." delay="2 ms"/>
            <connectionWD id="1" preCellId="../popInh/1/AllenHH_476686112" postCellId="../popExc2/0/L23PyrRS" postFractionAlong="0.290457284471" weight="1." delay="2 ms"/>
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        </projection>
        <projection id="projII_popInh_popInh" presynapticPopulation="popInh" postsynapticPopulation="popInh" synapse="synGaba1">
            <connectionWD id="0" preCellId="../popInh/0/AllenHH_476686112" postCellId="../popInh/4/AllenHH_476686112" weight="1." delay="2 ms"/>
            <connectionWD id="1" preCellId="../popInh/0/AllenHH_476686112" postCellId="../popInh/24/AllenHH_476686112" weight="1." delay="2 ms"/>
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        </projection>
        <inputList id="Stim_popExc" population="popExc" component="psf1">
            <input id="0" target="../popExc/0/AllenHH_477127614" destination="synapses" segmentId="0" fractionAlong="0.5"/>
            <input id="1" target="../popExc/1/AllenHH_477127614" destination="synapses" segmentId="0" fractionAlong="0.5"/>
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        </inputList>
        <inputList id="Stim_popExc2" population="popExc2" component="psf1">
            <input id="0" target="../popExc2/0/L23PyrRS" destination="synapses" segmentId="0" fractionAlong="0.5"/>
        </inputList>
    </network>
</neuroml>
