<neuroml xmlns="http://www.neuroml.org/schema/neuroml2"  xmlns:xs="http://www.w3.org/2001/XMLSchema" xmlns:xsi="http://www.w3.org/2001/XMLSchema-instance" xsi:schemaLocation="http://www.neuroml.org/schema/neuroml2 https://raw.github.com/NeuroML/NeuroML2/development/Schemas/NeuroML2/NeuroML_v2beta5.xsd" id="Multiscale__g1_5__i250D">
    <notes>

This NeuroML 2 file was generated by OpenCortex v0.1.6 using:
    libNeuroML v0.2.34
    pyNeuroML v0.3.2

    </notes>
    <property tag="Network seed" value="1234"/>
    <include href="Multiscale__g1_5__i250D/AllenHH_477127614.cell.nml"></include>
    <include href="Multiscale__g1_5__i250D/NaTs.channel.nml"></include>
    <include href="Multiscale__g1_5__i250D/K_P.channel.nml"></include>
    <include href="Multiscale__g1_5__i250D/Nap.channel.nml"></include>
    <include href="Multiscale__g1_5__i250D/Kv3_1.channel.nml"></include>
    <include href="Multiscale__g1_5__i250D/K_T.channel.nml"></include>
    <include href="Multiscale__g1_5__i250D/SK.channel.nml"></include>
    <include href="Multiscale__g1_5__i250D/Im.channel.nml"></include>
    <include href="Multiscale__g1_5__i250D/Ih.channel.nml"></include>
    <include href="Multiscale__g1_5__i250D/Ca_LVA.channel.nml"></include>
    <include href="Multiscale__g1_5__i250D/Ca_HVA.channel.nml"></include>
    <include href="Multiscale__g1_5__i250D/pas.channel.nml"></include>
    <include href="Multiscale__g1_5__i250D/CaDynamics.nml"></include>
    <include href="Multiscale__g1_5__i250D/AllenHH_476686112.cell.nml"></include>
    <include href="Multiscale__g1_5__i250D/cADpyr229_L23_PC_5ecbf9b163_0_0.cell.nml"></include>
    <include href="Multiscale__g1_5__i250D/NaTs2_t.channel.nml"></include>
    <include href="Multiscale__g1_5__i250D/SKv3_1.channel.nml"></include>
    <include href="Multiscale__g1_5__i250D/NaTa_t.channel.nml"></include>
    <include href="Multiscale__g1_5__i250D/K_Tst.channel.nml"></include>
    <include href="Multiscale__g1_5__i250D/Nap_Et2.channel.nml"></include>
    <include href="Multiscale__g1_5__i250D/SK_E2.channel.nml"></include>
    <include href="Multiscale__g1_5__i250D/K_Pst.channel.nml"></include>
    <include href="Multiscale__g1_5__i250D/CaDynamics_E2_NML2.nml"></include>
    <include href="Multiscale__g1_5__i250D/Ca_LVAst.channel.nml"></include>
    <expTwoSynapse id="synAmpa1" gbase="1.0nS" erev="0mV" tauDecay="5ms" tauRise="0.5ms"/>
    <expTwoSynapse id="synGaba1" gbase="1.5nS" erev="-80mV" tauDecay="20ms" tauRise="1ms"/>
    <poissonFiringSynapse id="psf1" averageRate="250 Hz" synapse="synAmpa1" spikeTarget="./synAmpa1"/>
    <network id="Multiscale__g1_5__i250D" type="networkWithTemperature" temperature="32degC">
        <population id="popExc" component="AllenHH_477127614" size="79" type="populationList">
            <instance id="0">
                <location x="326.517470000000003" y="-11.853479999999999" z="-344.755969999999991"/>
            </instance>
            <instance id="1">
                <location x="287.683170000000018" y="87.853800000000007" z="57.5593"/>
            </instance>
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        </population>
        <population id="popExc2" component="cADpyr229_L23_PC_5ecbf9b163_0_0" size="1" type="populationList">
            <instance id="0">
                <location x="127.926000000000002" y="-33.781730000000003" z="44.925879999999999"/>
            </instance>
        </population>
        <population id="popInh" component="AllenHH_476686112" size="40" type="populationList">
            <instance id="0">
                <location x="-236.225999999999999" y="-0.11679" z="308.033650000000023"/>
            </instance>
            <instance id="1">
                <location x="315.127889999999979" y="-72.012259999999998" z="22.61965"/>
            </instance>
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        </population>
        <projection id="projEE_popExc_popExc" presynapticPopulation="popExc" postsynapticPopulation="popExc" synapse="synAmpa1">
            <connectionWD id="0" preCellId="../popExc/0/AllenHH_477127614" postCellId="../popExc/73/AllenHH_477127614" weight="1." delay="2 ms"/>
            <connectionWD id="1" preCellId="../popExc/0/AllenHH_477127614" postCellId="../popExc/72/AllenHH_477127614" weight="1." delay="2 ms"/>
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        </projection>
        <projection id="projEE_popExc_popExc2" presynapticPopulation="popExc" postsynapticPopulation="popExc2" synapse="synAmpa1">
            <connectionWD id="0" preCellId="../popExc/0/AllenHH_477127614" postCellId="../popExc2/0/cADpyr229_L23_PC_5ecbf9b163_0_0" postSegmentId="78" postFractionAlong="0.680788376543" weight="1." delay="2 ms"/>
            <connectionWD id="1" preCellId="../popExc/5/AllenHH_477127614" postCellId="../popExc2/0/cADpyr229_L23_PC_5ecbf9b163_0_0" postSegmentId="216" postFractionAlong="0.983487221193" weight="1." delay="2 ms"/>
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        </projection>
        <projection id="projEI_popExc_popInh" presynapticPopulation="popExc" postsynapticPopulation="popInh" synapse="synAmpa1">
            <connectionWD id="0" preCellId="../popExc/0/AllenHH_477127614" postCellId="../popInh/6/AllenHH_476686112" weight="1." delay="2 ms"/>
            <connectionWD id="1" preCellId="../popExc/0/AllenHH_477127614" postCellId="../popInh/13/AllenHH_476686112" weight="1." delay="2 ms"/>
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        </projection>
        <projection id="projEE_popExc2_popExc" presynapticPopulation="popExc2" postsynapticPopulation="popExc" synapse="synAmpa1">
            <connectionWD id="0" preCellId="../popExc2/0/cADpyr229_L23_PC_5ecbf9b163_0_0" preSegmentId="5" preFractionAlong="0.142230072221" postCellId="../popExc/2/AllenHH_477127614" weight="1." delay="2 ms"/>
            <connectionWD id="1" preCellId="../popExc2/0/cADpyr229_L23_PC_5ecbf9b163_0_0" preSegmentId="12" preFractionAlong="0.814975425376" postCellId="../popExc/6/AllenHH_477127614" weight="1." delay="2 ms"/>
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        </projection>
        <projection id="projEI_popExc2_popInh" presynapticPopulation="popExc2" postsynapticPopulation="popInh" synapse="synAmpa1">
            <connectionWD id="0" preCellId="../popExc2/0/cADpyr229_L23_PC_5ecbf9b163_0_0" preSegmentId="12" preFractionAlong="0.673406527585" postCellId="../popInh/0/AllenHH_476686112" weight="1." delay="2 ms"/>
            <connectionWD id="1" preCellId="../popExc2/0/cADpyr229_L23_PC_5ecbf9b163_0_0" preSegmentId="2" preFractionAlong="0.170252437098" postCellId="../popInh/1/AllenHH_476686112" weight="1." delay="2 ms"/>
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        </projection>
        <projection id="projIE_popInh_popExc" presynapticPopulation="popInh" postsynapticPopulation="popExc" synapse="synGaba1">
            <connectionWD id="0" preCellId="../popInh/7/AllenHH_476686112" postCellId="../popExc/0/AllenHH_477127614" weight="1." delay="2 ms"/>
            <connectionWD id="1" preCellId="../popInh/39/AllenHH_476686112" postCellId="../popExc/0/AllenHH_477127614" weight="1." delay="2 ms"/>
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        </projection>
        <projection id="projIE_popInh_popExc2" presynapticPopulation="popInh" postsynapticPopulation="popExc2" synapse="synGaba1">
            <connectionWD id="0" preCellId="../popInh/0/AllenHH_476686112" postCellId="../popExc2/0/cADpyr229_L23_PC_5ecbf9b163_0_0" postSegmentId="10" postFractionAlong="0.296124555038" weight="1." delay="2 ms"/>
            <connectionWD id="1" preCellId="../popInh/1/AllenHH_476686112" postCellId="../popExc2/0/cADpyr229_L23_PC_5ecbf9b163_0_0" postSegmentId="3" postFractionAlong="0.904577868422" weight="1." delay="2 ms"/>
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        </projection>
        <projection id="projII_popInh_popInh" presynapticPopulation="popInh" postsynapticPopulation="popInh" synapse="synGaba1">
            <connectionWD id="0" preCellId="../popInh/0/AllenHH_476686112" postCellId="../popInh/4/AllenHH_476686112" weight="1." delay="2 ms"/>
            <connectionWD id="1" preCellId="../popInh/0/AllenHH_476686112" postCellId="../popInh/24/AllenHH_476686112" weight="1." delay="2 ms"/>
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        </projection>
        <inputList id="Stim_popExc" population="popExc" component="psf1">
            <input id="0" target="../popExc/0/AllenHH_477127614" destination="synapses" segmentId="0" fractionAlong="0.5"/>
            <input id="1" target="../popExc/1/AllenHH_477127614" destination="synapses" segmentId="0" fractionAlong="0.5"/>
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        </inputList>
        <inputList id="Stim_popExc2" population="popExc2" component="psf1">
            <input id="0" target="../popExc2/0/cADpyr229_L23_PC_5ecbf9b163_0_0" destination="synapses" segmentId="0" fractionAlong="0.5"/>
        </inputList>
    </network>
</neuroml>
